<Lems>

    <Include file="RateBased2.xml" />

    <!--Dummy synapse which emits no current. Used as presynaptic endpoint for analog synaptic connection.-->
    <silentSynapse id="silent1"/>
    <rateSynapse id="rs" />

    <simpleRateUnit id="Ecomp"  tau="10ms" r0="0Hz"/>
    <simpleRateUnit id="Icomp"  tau="5ms" r0="5Hz"/>

    <pulseGenerator id="baselineE" delay="50ms" duration="50ms" amplitude="8nA" />

</Lems>
